Simulations: Version=169
  DataStore
    ExcelInput ExcelInputClover: FileNames=[Validation\ausfarm_test_clover_ryegrass.xlsx]; SheetNames=[CloverGrowth]
    ExcelInput ExcelInputCloverMass: FileNames=[Validation\ausfarm_test_clover_ryegrass.xlsx]; SheetNames=[CloverMasses]
    ExcelInput ExcelInputRyegrass: FileNames=[Validation\ausfarm_test_clover_ryegrass.xlsx]; SheetNames=[RyegrassGrowth]
    ExcelInput ExcelInputRyegrassMass: FileNames=[Validation\ausfarm_test_clover_ryegrass.xlsx]; SheetNames=[RyegrassMasses]
  Simulation Base
    Weather: FileName=Validation\Hamilton.txt
    Clock: Start=1990-01-01; End=2000-02-03
    Summary summaryfile
    SoilArbitrator Soil Arbitrator
    MicroClimate: a_interception=0; b_interception=1; c_interception=0; d_interception=0; SoilHeatFluxFraction=0.4; MinimumHeightDiffForNewLayer=0; NightInterceptionFraction=0.5; ReferenceHeight=2
    Zone Paddock: Area=1; Slope=0; AspectAngle=0; Altitude=50
      Manager Sowing (disabled)
        InitialRootDepth = 10
        Cultivar = Booma
        SowingDate = 10/01/2009 00:00:00
```csharp
using Models.Soils;
using System;
using System.Linq;
using Models.Core;
using System.Collections.Generic;
using System.Text;
using Models.PMF;
using Models;
using System.Xml.Serialization;
using APSIM.Shared.Utilities;
using System.Data;
using Models.PMF.Interfaces;
using Models.Surface;

namespace Models
{
    [Serializable] 
    //[System.Xml.Serialization.XmlInclude(typeof(Model))]
    public class Script : Model
    {
        [Link] Plant Barley;
        [Link] Clock Clock;
        [Link] Zone zone;
        [Link] Simulation Simulation;
        [Link] SurfaceOrganicMatter SurfOM;
        
                
        [Description("Initial Root Depth")]
        public double InitialRootDepth { get; set; }
        [Description("Cultivar name")]
        public string Cultivar { get; set; }
        [Description("Sowing Date")]
        public DateTime SowingDate { get; set; }
        
        
        [EventSubscribe("DoManagement")]
        private void OnDoManagement(object sender, EventArgs e)
        {
            if (Clock.Today.Date == SowingDate)
            {
                Barley.Sow(cultivar: Cultivar, population: 280, depth: InitialRootDepth, rowSpacing: 150);
                
            }
        }
    }
}
```
      Operations IrrigationEvents
        2009-11-11  [Irrigation].Apply(20);
        2009-11-19  [Irrigation].Apply(25);
        2009-11-26  [Irrigation].Apply(25);
        2009-12-11  [Irrigation].Apply(20);
        2009-12-21  [Irrigation].Apply(35);
        2009-12-29  [Irrigation].Apply(40);
        2010-01-05  [Irrigation].Apply(35);
        2010-01-13  [Irrigation].Apply(30);
        2010-03-02  [Irrigation].Apply(40);
        2010-03-03  [Irrigation].Apply(40);
      Operations FertiliserEvents
        2009-11-23  [Fertiliser].Apply(150, Fertiliser.Types.NO3N,10);
      Soil Clay (Dunkeld No632-YP): SoilType=Clay; Site=Dunkeld; NearestTown=Dunkeld; Region=South West; State=Victoria; Country=Australia; ApsoilNumber=632-YP; Latitude=-37.649; Longitude=142.342; LocationAccuracy=Regional Soil Type; YearOfSampling=0; DataSource=YP. Data provided by Tim Johnston (DPI Vic)
        Comments=Clay - Wheat CLL measured, Barley estimated; OC & pH estimated for all laters;
        Physical
          Thickness  BD     AirDry  LL15  DUL    SAT
          100        0.93   0.035   0.07  0.25   0.619
          100        1.3    0.16    0.2   0.4    0.479
          200        1.281  0.2     0.2   0.437  0.487
          200        1.33   0.2     0.2   0.4    0.468
          200        1.29   0.2     0.2   0.38   0.483
          200        1.39   0.2     0.2   0.36   0.445
          200        1.321  0.2     0.2   0.422  0.472
          200        1.27   0.2     0.2   0.44   0.491
          200        1.313  0.2     0.2   0.425  0.475
          BD, AirDry, LL15, DUL, SAT source: Unknown source or quality of data
          SoilCrop wheatSoil: LL=[0.07, 0.2, 0.2, 0.2, 0.21, 0.3, 0.244, 0.28, 0.316]; KL=[0.06, 0.06, 0.06, 0.06, 0.04, 0.04, 0.04, 0.02, 0.02]; XF=[1, 1, 1, 1, 1, 1, 1, 1, 1]
            LL source: Field measured and checked for sensibility
          SoilCrop barleySoil: LL=[0.07, 0.2, 0.2, 0.2, 0.21, 0.3, 0.244, 0.28, 0.316]; KL=[0.07, 0.07, 0.07, 0.07, 0.05, 0.05, 0.05, 0.03, 0.03]; XF=[1, 1, 1, 1, 1, 1, 1, 1, 1]
            LL source: Estimated based on local knowledge
          SoilCrop Sub Clover - LeuraSoil: same as Base.Paddock.Clay (Dunkeld No632-YP).Physical.wheatSoil
          SoilCrop Perennial RyegrassSoil: LL=[0.07, 0.2, 0.2, 0.2, 0.21, 0.3, 0.244, 0.28, 0.316]; KL=[0.07, 0.07, 0.07, 0.06, 0.04, 0.02, 0.02, 0.02, 0.02]; XF=[1, 1, 1, 1, 1, 1, 1, 1, 1]
        WaterBalance SoilWater: SummerDate=1-Nov; SummerU=6; SummerCona=3.5; WinterDate=1-Apr; WinterU=2; WinterCona=2; DiffusConst=40; DiffusSlope=16; Salb=0.13; CN2Bare=73; CNRed=20; CNCov=0.8; PSIDul=-100; Thickness=[100, 100, 200, 200, 200, 200, 200, 200, 200]; SWCON=[0.4, 0.4, 0.3, 0.3, 0.3, 0.3, 0.25, 0.25, 0.25]
        Organic: FOMCNRatio=40; CarbonUnits=WalkleyBlack
          Thickness  Carbon  SoilCNRatio  FBiom  FInert  FOM
          100        1.05    12           0.04   0.4     284.162
          100        0.45    12           0.04   0.4     235.579
          200        0.3     12           0.02   0.6     161.911
          200        0.3     12           0.02   0.7     111.28
          200        0.25    12           0.02   0.8     76.481
          200        0.25    12           0.02   1       52.565
          200        0.2     12           0.01   1       36.127
          200        0.1     12           0.01   1       24.83
          200        0.1     12           0.01   1       17.065
        Chemical: Thickness=[100, 100, 200, 200, 200, 200, 200, 200, 200]; PH=[8.5, 8.8, 8.9, 8.9, 8.9, 8.9, 8.9, 8.9, 8.9]; PHUnits=Water
          PH source: Estimated based on local knowledge
        Nutrient
        Solute NH4: Thickness=[100, 100, 200, 200, 200, 200, 200, 200, 200]; InitialValues=[0, 0, 0, 0, 0, 0, 0, 0, 0]; InitialValuesUnits=ppm; WaterTableConcentration=0; D0=0; DepthConstant=0; MaxDepthSoluteAccessible=0; RunoffEffectivenessAtMovingSolute=0; MaxEffectiveRunoff=0
        Solute NO3: Thickness=[100, 100, 200, 200, 200, 200, 200, 200, 200]; InitialValues=[30, 10, 4, 2, 1.5, 1.5, 1.5, 1.5, 1.5]; InitialValuesUnits=ppm; WaterTableConcentration=0; D0=0; DepthConstant=0; MaxDepthSoluteAccessible=0; RunoffEffectivenessAtMovingSolute=0; MaxEffectiveRunoff=0
        Solute Urea: Thickness=[100, 100, 200, 200, 200, 200, 200, 200, 200]; InitialValues=[0, 0, 0, 0, 0, 0, 0, 0, 0]; InitialValuesUnits=kg/ha; WaterTableConcentration=0; D0=0; DepthConstant=0; MaxDepthSoluteAccessible=0; RunoffEffectivenessAtMovingSolute=0; MaxEffectiveRunoff=0
        Water: Thickness=[100, 100, 200, 200, 200, 200, 200, 200, 200]; InitialValues=[0.25, 0.4, 0.437, 0.4, 0.38, 0.36, 0.422, 0.44, 0.425]; InitialPAWmm=330.8; RelativeTo=LL15; FilledFromTop=false
        CERESSoilTemperature
      SurfaceOrganicMatter Surface Organic Matter: InitialResidueType=Barley; InitialResidueMass=0; InitialStandingFraction=0; InitialCPR=0; InitialCNR=0
      Irrigation
      Fertiliser
      Report DailyReport: EventNames=[Clock].DoReport
        VariableNames:
          [Clock].Today
          sum([Clover].Uptake_NH4) as NH4Uptake
          sum([Clover].Uptake_NO3) as NO3Uptake
          sum([Clover].SWUptake)
          [Clover].Growth
          [Clover].GreenDM
          [Clover].AvailGreen
          [Clover].AvailDM
          [Clover].DryDM
          [Clover].LitterDM
          [Ryegrass].Growth
          [Ryegrass].GreenDM
          [Ryegrass].AvailGreen
          [Ryegrass].AvailDM
          [Ryegrass].DryDM
          [Ryegrass].LitterDM
          [Clover].WaterDemand
          [Clover].WaterDemandSupply
          (sum([Soil].Urea.kgha) + sum([Soil].NH4.kgha) + sum([Soil].NO3.kgha)) as SoilNContent_kgha
          [Clover].GLF_GAI
          [Clover].GLF_N
          [Clover].GLF_Nutr
          [Clover].GLF_SM
          [Clover].GLF_Temp
          [Clover].GLF_VPD
          [Clover].GLF_WL
          sum([Water].MM) as total_water
          [Clover].CoverGreen
          [Clover].CoverTotal
          [Clover].LAI
          sum([NO3].kgha) as TotalNO3
          sum([NH4].kgha) as TotalNH4
          [Clover].PotentialEP
          sum([Clover].SWUptake) as EP
          [Clover].SWUptake
          [Clover].SeedDM
          [Clover].SeedSoftUnripe[1]
          [Clover].SeedHardUnripe[1]
          [Clover].SeedHardRipe[1]
          [Clover].SeedSoftRipe[1]
      Report HarvestReport: EventNames=[Clock].EndOfSimulation
        VariableNames:
          [Clock].Today
          //[Barley].AboveGroundLive.Wt
          //[Barley].Leaf.LAI
      Pasture Clover: Species=Sub Clover - Leura; Nutrients=N; MaxRtDep=550; LaggedDayT=-999.9; Phenology=4; FlowerLen=0; FlowerTime=0; SencIndex=0; DormIndex=0; DormT=-999.9; ExtinctCoeff=[0, 0, 0]; SeedDormTime=0; GermIndex=0; Albedo=0.23; Gsmax=0.011; R50=200; WaterDemand=0; LAI=0
        Seeds={soft_unripe=[0], soft_ripe=[0], hard_unripe=[0], hard_ripe=[0]}
        DryCohortInitialise Dead: Status=dead; LeafDMD=[0.55]; LeafWeight=[1000]; LeafNConc=[0]; LeafSpecificArea=[415]; StemDMD=[0.55]; StemWeight=[1000]; StemNConc=[0]; StemSpecificArea=[100]
        DryCohortInitialise Litter: Status=litter; LeafDMD=[0.55]; LeafWeight=[101]; LeafNConc=[0]; LeafSpecificArea=[415]; StemDMD=[0.5]; StemWeight=[99]; StemNConc=[0]; StemSpecificArea=[100]
        SeedCohortInitialise: SoftUnripe=[467]; HardUnripe=[545]; HardRipe=[121]; SoftRipe=[14.58]
      Pasture Ryegrass: Species=Perennial Ryegrass; Nutrients=N; MaxRtDep=650; LaggedDayT=-999.9; Phenology=3.015; FlowerLen=0; FlowerTime=0; SencIndex=0; DormIndex=0; DormT=-999.9; ExtinctCoeff=[0, 0, 0]; SeedDormTime=0; GermIndex=0; Albedo=0.23; Gsmax=0.011; R50=200; WaterDemand=0; LAI=0
        Seeds={soft_unripe=[0], soft_ripe=[0], hard_unripe=[0], hard_ripe=[0]}
        GreenCohortInitialise GreenEst: RootWeight=[0, 400]; RootDepth=650; EstIndex=0; StressIndex=0; StemReloc=0; Frosts=0; Status=established; LeafDMD=[0.82]; LeafWeight=[900]; LeafNConc=[0.01]; LeafSpecificArea=[430]; StemDMD=[0.73]; StemWeight=[1096]; StemNConc=[0.01]; StemSpecificArea=[10]
        GreenCohortInitialise GreenSen: RootWeight=[200, 0]; RootDepth=650; EstIndex=0; StressIndex=0; StemReloc=0; Frosts=0; Status=senescing; LeafDMD=[0.825]; LeafWeight=[397]; LeafNConc=[0.006]; LeafSpecificArea=[10]; StemDMD=[0.825]; StemWeight=[2000]; StemNConc=[0.006]; StemSpecificArea=[10]
        DryCohortInitialise Dead: Status=dead; LeafDMD=[0.6]; LeafWeight=[52]; LeafNConc=[0.006]; LeafSpecificArea=[430]; StemDMD=[0.35]; StemWeight=[500]; StemNConc=[0.006]; StemSpecificArea=[80]
        DryCohortInitialise Litter: Status=litter; LeafDMD=[0.65]; LeafWeight=[2]; LeafNConc=[0.001]; LeafSpecificArea=[10]; StemDMD=[0.35]; StemWeight=[130]; StemNConc=[0.001]; StemSpecificArea=[10]
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